# Gearbox Design Project
# Lastname, Firstname A00000000
# Lastname, Firstname A00000000
# Lastname, Firstname A00000000
# Lastname, Firstname A00000000
# Lastname, Firstname A00000000
# This project is to design a gearbox to transmit power in a motor-jet axial compressor application. This team used AISI 1030 HR steel in the shaft, TODO: ADD MORE HERE
# NOTE!!!!: THE FINAL VERSION OF THIS DOCUMENT WILL HAVE TABLES OF THE CALCULATIONS AND SUCH FOR THE FIRST FEW PAGES, THEN IT WILL PRESENT THE FULL CALCULATIONS
# CAD drawing goes here
# Shaft Analysis Points
# Input Shaft
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# Output Shaft
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# Problem Specifications
# Properties of AISI 1030 HR
S_ut := 68 ksi  # Ultimate Tensile Strength
S_Y := 37.5 ksi  # Yield Strength
# Input Speed
n_g := 6700 rpm
# Output Speed
n_p := 20000 rpm
# Pre-Defined Gear Properties
ϕ_n := 20 deg  # Normal Pressure Angle
ψ := 30 deg  # Helix Angle
# Face Width
F := 2 in
# Gear ratio, diameter, and transmitted force
# eqs
# 13-19
#
# 13-22
# 13-1
#
# 13-23
#
# 13-18
# table 13-2
# First, we determine the number of allowable teeth by checking tooth interference.
# The gear ratio from the required shaft speeds
ratio := n_p/n_g = 2.98507
# Transverse pressure angle from normal pressure angle and helix angle
ϕ_t := atan(tan(ϕ_n)/cos(ψ)) = 22.7959 deg
# Minimum number of full height teeth for pinion for no interference
# eq (13-22)
N_p_min := ceil(2*cos(ψ)/((1 + 2*ratio)*sin(ϕ_t)^2)*(ratio + sqrt(ratio^2 + (1 + 2*ratio)*sin(ϕ_t)^2))) = 11
# Maximum number of full height teeth on gear for no interference
# eq (13-23)
N_g_max := floor((N_p_min^2*sin(ϕ_t)^2 - 4*cos(ψ)^2)/(4*cos(ψ) - 2*N_p_min*sin(ϕ_t)^2)) = 93
# Then, we select tooth numbers that do not have interference and check that the can make a gear ratio within the 1% speed specification
# Choose gear tooth numbers based on gear ratio that fit within interference bounds
N_p := 13
N_g := round(N_p*ratio) = 39
# Resulting output speed and % difference from specification
n_p_design := N_g/N_p*n_g = 20100 rpm
|(n_p - n_p_design)/n_p| = 0.005
# The % difference is 0.5%, less than the 1% required by "More Requirements: 1."
n_p := n_p_design
# Normal diametrical pitch from teeth and helix angle
maxWidth := 15 - 1.5 = 13.5  # disabled  # SUPRESSED BECAUSE WE DON'T USE IT
# max width from "More Requirements: 3."
P_n := round((N_p/cos(ψ) + N_g/(cos(ψ) + 2))/maxWidth) = 2  # disabled
# Normal diametrical pitch selected from table 13-2
P_n := 8 1/in
# Transverse diametrical pitch | eq (13-18)
P_t := P_n*cos(ψ) = 6.9282 1/in
# Gear and pinion diameters | eq (13-1)
d_p := N_p/P_t = 1.87639 in
d_g := N_g/P_t = 5.62917 in
# Pitch-line velocity | eq (13-34) (removed unit dependency)
V := d_g/2*n_g = 9873.87 ft/min
# Transmitted load | eq (13-35) (removed unit dependency)
Wt := 150 hp/V = 501.323 lbf
# Reaction Forces on Output Shaft
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# Previous Calculations
Wt = 501.323 lbf
ϕ_t = 22.7959 deg
d_p = 1.87639 in
# Component vectors of W (eq 13-40)
Wr32 := tan(ϕ_t)*Wt = 210.694 lbf
Wa32 := -tan(ψ)*Wt = -289.439 lbf
Wt32 := Wt = 501.323 lbf
# Sum of forces in axial direction
RCx := -Wa32 = 289.439 lbf
# Sum of moments in about the z-axis at the point C
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Mr32 := -(2/2 + .5 + .75/2)*in*Wr32 = -395.052 lbf*in
Ma32 := d_p/2*Wa32 = -271.55 lbf*in
RCy := (Mr32 + Ma32)/((.75/2 + .5 + 2 + .5 + .75/2) in) = -177.761 lbf
# Sum of forces in y direction
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RDy := -Wr32 - RCy = -32.9339 lbf
# Sum of moments about y at the point C
Mt32 := (2/2 + .5 + .75/2) in*Wt32 = 939.981 in*lbf
RDz := -Mt32/((.75/2 + .5 + 2 + .5 + .75/2) in) = -250.662 lbf
# Sum of forces in z direction
RCz := -Wt32 - RDz = -250.662 lbf
# The reaction forces on the output shaft are:
RCx = 289.439 lbf
RCy = -177.761 lbf
RCz = -250.662 lbf
RDy = -32.9339 lbf
RDz = -250.662 lbf
# Reaction Forces on Input Shaft
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# Previous Calculations
Wt = 501.323 lbf
ϕ_t = 22.7959 deg
d_g = 5.62917 in
# Component vectors of W (eq 13-40)
Wr23 := tan(ϕ_t)*Wt = 210.694 lbf
Wa23 := tan(ψ)*Wt = 289.439 lbf
Wt23 := -Wt = -501.323 lbf
# Sum of forces in axial direction
RBx := -Wa23 = -289.439 lbf
# Sum of moments about z at the point A
Mr23 := (2/2 + .5 + .75/2)*in*Wr23 = 395.052 lbf*in
Ma23 := d_g/2*Wa23 = 814.65 lbf*in
RBy := (-Mr23 - Ma23)/((.75/2 + .5 + 2 + .5 + .75/2) in) = -322.587 lbf
# Sum of forces in y direction
RAy := -Wr32 - RBy = 111.893 lbf
# Sum of moments about y at the point A
Mt23 := (2/2 + .5 + .75/2) in*Wt23 = -939.981 lbf*in
RBz := Mt23/((.75/2 + .5 + 2 + .5 + .75/2) in) = -250.662 lbf
# Sum of forces in z direction
RAz := -RBz - Wt23 = 751.985 lbf
# The reaction forces on the output shaft are:
RBx = -289.439 lbf
RBy = -322.587 lbf
RBz = -250.662 lbf
RAy = 111.893 lbf
RAz = 751.985 lbf
# AGMA Coefficients
# Using a quality value of 11:
Qv := 11
# WHY 11?
# Overload Factor
Ko := 1.25  # Because of light shock from power source and uniform shock from driven machine (Table pg 772, Figure 14-17)
# Dynamic Factor
B := .25*(12 - Qv)^(2/3)  # eq (14-28)
A := (50 + 56*(1 - B))*sqrt(ft/min)
# eq (14-27)
Kv := ((A + sqrt(V))/A)^B = 1.20094
# Size Factor
Ks := 1  # Choosing to use Ks=1 rather than using eq (a)
# Load Distribution Factor
# Because  , the gears are
#
# mounted between the bearings,
# , and assuming the fully loaded contact will be across the full width of the narrowest member; the AGMA load distribution factor equations are valid
F/d_p ≤ 2 = 1
# For uncrowned teeth:
Cmc := 1  # eq (14-31)
# Depending on the face width:
F ≤ 40 in = 1
Cpf :=
    if F ≤ 1 in
        F/(10*d_p) - 0.025
    else
        F/(10*d_p) - 0.0375 + (0.0125 1/in)*F
# eq (14-32) modified to take into account maximum design F is 2, not 40
# Because straddle mounted pinion is centered, S_1/S=0, thus:
Cpm := 1  # eq (14-33)
# For our commercial, enclosed gearbox:
# From Table 14-9:
A := 0.127
B := 0.0158
C := -.930*10^-4
Cma := A + B*F/in + C*F^2/in^2  # eq (14-34)
# For no assembly-time adjustment or lapping:
Ce := 1  # eq (14-35)
Km := 1 + Cmc*(Cpf*Cpm + Cma*Ce) = 1.25232
# Rim-thickness Factor
# Because the rims are not thin, the rim-thickness factor is not needed and is therefore set to 1
Kb := 1
# Bending Stress Geometry Factors
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# Figure 14-7
# Gears with less than 20 are treated as having 20 teeth
Jprime_g := .50
Jprime_p := .465
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# Gears with less than 20 are treated as having 20 teeth
Jmod_g := .945
Jmod_p := .97
J_p := Jprime_p*Jmod_p = 0.45105
J_g := Jprime_g*Jmod_g = 0.4725
# Bending Strength
# Guess:
St := 4500 psi  # TODO : ChECK THIS
# Bending Stress Cycle Life Factors
# Bending stress cycle life equations require life in rotations, calculated here
LifeTime := 1000 hr
LifeRev_p := LifeTime*n_p = 1206000000 rev
LifeRev_g := LifeTime*n_g = 402000000 rev
# Using equation for lower bound of shaded region because...
# DOUBLE CHECK THE REASONING BBEHIND THE EQUATION CHOICE WITH THE TEAM
YN_p := 1.6831*LifeRev_p^-0.0323 = 0.807237
YN_g := 1.6831*LifeRev_g^-0.0323 = 0.836397  # equations from fig 14-14
# Temperature Factor
# Assuming operation temperatures are bellow 250 _degF:
Kt := 1
# Reliability Factor
# The design specifications require a 90% reliability. Because .9 is on table 14-10, table 14-10 is preferred to equation 14-38
Kr := .85
# Elastic Coefficient
# Elastic coefficient and Poisson's ratio properties of the gear and pinion using the values recommended in table 14-8
E := 30*10^6 psi
ν := .3
# Using equation 14-13 to provide more accuracy than the values provided in table 14-8
Cp := sqrt(1/(2*π*((1 - ν^2)/E)))  # eq (14-13) adjusted for gear and pinion having same material properties
# Surface Condition Factor
# Currently, no detrimental surface finish effect is known, thus:
Cf := 1
# Contact Geometry Factor
# TO DO! requires eq 14-23 and tons of math
# Allowable Contact Stress
# Contract Stress Cycle Life Factors
# Using equation for the bottom line because....
ZN_p := 2.466*LifeRev_p^-0.056  # equation from figure 14-15
ZN_g := 2.466*LifeRev_g^-0.056
# Hardness Ratio Factors
# By definition, the hardness ratio factor for the pinion is:
CH_p := 1
# If the gear and pinion have the same or similar hardness:
CH_g := 1
# CALCULATING THIS REQUIRES BETTER KNOWLEDGE OF THE DESIRED HARDNESS
# Bending Stress Factors of Safety
# Contact Stress Factors of Safety
# Shaft Point Analysis
# Analysis Point distances from the left of the shaft as shown in the figures
# Input Shaft | Output Shaft
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G := 2 in
Q := 1.25 in
H := 2.75 in
S := 1.25 in + (3 in - F)/2 = 1.75 in
I := 3 in
J := 3.75 in
R := S - 0.25 in
L := 3.75 in + (3 in - F)/2 = 4.25 in
U := S + F = 3.75 in
T := U - 0.25 in = 3.5 in
K := L - 0.25 in
V := U + 0.25 in = 4 in
M := L + 0.25 in
W := 4.25 in
N := L + F = 6.25 in
X := W + 0.75 in = 5 in
O := N + 0.25 in = 6.5 in
Y := X + 0.25 in = 5.25 in
P := 6.25 in
Z := X + 1 in = 6 in
# Endurance Limit
# First we need to adjust the test-specimen ultimate strength to a working endurance strength
# For  :
S_ut ≤ 200 ksi = 1
Seprime := .5*S_ut = 34 ksi  # eq (6-10)
# Next we adjust the working endurance strength by several situational factors to get the final endurance strength
# For machined surface finish:
ka := 2*(S_ut/ksi)^-0.217 = 0.800526  # eq (6-18)
# For our round, rotating shaft:
kb(d) :=
    if d ≤ 2 in
        (d/(.3*in))^-0.107
    else
        0.91*(d/in)^-0.157  # eq (6-19)
# For combined loading:
kc := 1  # eq (6-25)
# For operating temperatures that do not deviate far from room temperature:
kd := 1  # eq (6-26&27)
# For 90% reliability:
ke := .897  # (Table 6-5)
# For any other miscellany (change this to account for effects such as corrosion or residual stresses):
kf := 1
# Final Endurance Strength Limit as a function of d:
Se(d) := ka*kb(d)*kc*kd*ke*kf*Seprime  # eq (6-17)
# Stress Concentrations
# These functions and constants find the stress concentration factors for various geometries
# (Table 7-1)
# Sharp Shoulder Fillet
# Bending:
Kt_sharp := 2.7
# Shear:
Kts_sharp := 2.2
# Notch radius:
r_sharp(d) := .02*d
# Well-rounded Shoulder Fillet
# Bending:
Kt_round := 1.7
# Shear:
Kts_round := 1.5
# Notch radius:
r_round(d) := .1*d
# End Mill Keyseat
# Bending:
Kt_key := 2.14
# Shear:
Kts_key := 3.0
# Notch radius:
r_key(d) := .02*d
# Retaining Ring Groove:
# Bending:
Kt_ring := 5.0
# Shear:
Kts_ring := 3.0
# Notch radius:
r_ring(d) := .01*d
# To adjust for notch sensitivity | combined eq (6-34) & eq (6-35)
Kf(Kt, r) := 1 + (Kt - 1)/(1 + (0.246 - 3.08*(10^-3)*S_ut/ksi + 1.51*(10^-5)*(S_ut/ksi)^2 - 2.67*(10^-8)*(S_ut/ksi)^3)/sqrt(r/in))
# combined eq (6-34) & eq (6-36)
Kfs(Kts, r) := 1 + (Kts - 1)/(1 + (0.190 - 2.51*(10^-3)*S_ut/ksi + 1.35*(10^-5)*(S_ut/ksi)^2 - 2.67*(10^-8)*(S_ut/ksi)^3)/sqrt(r/in))
# Failure Criterion Functions
# Goodman Criterion against fatigue yield, solved for safety factor, simplified for mean torque and alternating moment only
# eq (7-7)
n_Goodman(Ma, Tm, Kf, Kfs, d) := 1/(16/(π*d^3)*(sqrt(4*(Kf*Ma)^2)/Se(d) + sqrt(3*(Kfs*Tm)^2)/S_ut))
# Goodman Criterion against fatigue yield, solved for diameter, simplified for mean torque and alternating moment only. Requires initial diameter guess
# eq (7-8)
d_Goodman(Ma, Tm, Kf, Kfs, n, d_init) := 16*n/π*(sqrt(4*(Kf*Ma)^2)/Se(d_init) + sqrt(3*(Kfs*Tm)^2)/S_ut)  # disabled
# Conservative Single-cycle Yield Check, solved for safety factor, simplified for mean torque and alternating moment only
# combined eq (6-43) with eq (7-4) and eq (7-5)
n_conservative(Ma, Tm, Kf, Kfs, d) := S_Y/(16/(π*d^3)*(sqrt(4*(Kf*Ma)^2) + sqrt(3*(Kfs*Tm)^2)))
# Conservative Single-cycle Yield Check, solved for diameter, simplified for mean torque and alternating moment only
d_conservative(Ma, Tm, Kf, Kfs, n) := 16*n/π*(sqrt(4*(Kf*Ma)^2) + sqrt(3*(Kfs*Tm)^2))/S_Y  # disabled
# Functions that determine the internal bending moment and torque at any given length along each shaft
Ain := 3.375 in
Ein := 5.25 in
inMoment(x) :=
    if x - Ain > 0
        if x - Ein > 0
            sqrt(((x - Ain)*RAy + (x - Ein)*Wr23 + d_g/2*Wa23)^2 + ((x - Ain)*RAz + (x - Ein)*Wt23)^2)
        else
            sqrt(((x - Ain)*RAy)^2 + ((x - Ain)*RAz)^2)
    else
        0
Dout := (.5 + .75 + 3 + .325) in = 4.575 in
Fout := 3.25 in
outMoment(x) :=
    if Dout - x > 0
        if Fout - x > 0
            sqrt(((Dout - x)*RDy + (Fout - x)*Wr32 + d_p/2*Wa32)^2 + ((Dout - x)*RDz + (Fout - x)*Wt32)^2)
        else
            sqrt(((Dout - x)*RAy)^2 + ((Dout - x)*RAz)^2)
    else
        0
inTorque(x) :=
    if 5.25 in > x > 1 in
        150 hp/n_g
    else
        0
outTorque(x) :=
    if 7 in > x > 2.75 in
        150 hp/n_p
    else
        0
